<Node name="root" dt="0.02" gravity="0 -10 0">
    <Node name="plugins">
        <RequiredPlugin name="Sofa.Component.Constraint.Projective"/> <!-- Needed to use components [FixedProjectiveConstraint] -->
        <RequiredPlugin name="Sofa.Component.LinearSolver.Direct"/> <!-- Needed to use components [SparseLDLSolver] -->
        <RequiredPlugin name="Sofa.Component.LinearSolver.Iterative"/> <!-- Needed to use components [CGLinearSolver] -->
        <RequiredPlugin name="Sofa.Component.Mass"/> <!-- Needed to use components [UniformMass] -->
        <RequiredPlugin name="Sofa.Component.ODESolver.Backward"/> <!-- Needed to use components [EulerImplicitSolver] -->
        <RequiredPlugin name="Sofa.Component.SolidMechanics.FEM.Elastic"/> <!-- Needed to use components [HexahedronFEMForceField] -->
        <RequiredPlugin name="Sofa.Component.StateContainer"/> <!-- Needed to use components [MechanicalObject] -->
        <RequiredPlugin name="Sofa.Component.Topology.Container.Grid"/> <!-- Needed to use components [RegularGridTopology] -->
        <RequiredPlugin name="Sofa.Component.Visual"/> <!-- Needed to use components [VisualStyle] -->
        <RequiredPlugin name="SofaMatrix"/> <!-- Needed to use components [GlobalSystemMatrixExporter] -->
        <RequiredPlugin name="BandMatrix"/>
        <RequiredPlugin name="CSparseSolvers"/> <!-- Needed to use components [SparseLUSolver] -->
        <RequiredPlugin name="Sofa.Component.LinearSystem"/> <!-- Needed to use components [MatrixLinearSystem] -->
        <RequiredPlugin name="Sofa.Component.Engine.Select"/> <!-- Needed to use components [BoxROI] -->
        <RequiredPlugin name="Sofa.Component.LinearSolver.Ordering"/> <!-- Needed to use components [NaturalOrderingMethod] -->
    </Node>


    <VisualStyle displayFlags="showBehaviorModels showForceFields" />

    <DefaultAnimationLoop name="animationLoop"/>
    <DefaultVisualManagerLoop name="visualLoop"/>

    <!-- <Node name="SparseLU_node">
        <EulerImplicitSolver name="odesolver" rayleighStiffness="0.1" rayleighMass="0.1" />
        <NaturalOrderingMethod/>
        <SparseLUSolver template="CompressedRowSparseMatrixMat3x3"/>

        <MechanicalObject name="DoFs" />
        <UniformMass name="mass" totalMass="320" />
        <RegularGridTopology name="grid" nx="4" ny="4" nz="20" xmin="-9" xmax="-6" ymin="0" ymax="3" zmin="0" zmax="19" />
        <RegularGridTopology nx="4" ny="4" nz="10" xmin="-9" xmax="-6" ymin="0" ymax="3" zmin="0" zmax="9" />
        <BoxROI name="box" box="-10 -1 -0.0001  -5 4 0.0001"/>
        <FixedProjectiveConstraint indices="@box.indices" />
        <HexahedronFEMForceField name="FEM" youngModulus="4000" poissonRatio="0.3" method="large" />
    </Node> -->

    <Node name="SparseLDL_node">
        <EulerImplicitSolver name="odesolver" printLog="false"  rayleighStiffness="0.1" rayleighMass="0.1" />
        <MatrixLinearSystem template="CompressedRowSparseMatrixMat3x3d"/>
        <SparseLDLSolver printLog="false" template="CompressedRowSparseMatrixMat3x3d"/>

        <MechanicalObject />
        <UniformMass vertexMass="1"/>
        <RegularGridTopology nx="4" ny="4" nz="10" xmin="-9" xmax="-6" ymin="0" ymax="3" zmin="0" zmax="9" />
        <FixedProjectiveConstraint indices="0 1 2 3 4 5 6 7 8 9 10 11 12 13 14 15" />
        <HexahedronFEMForceField name="FEM" youngModulus="4000" poissonRatio="0.3" method="large" />
    </Node>


   <!-- <Node name="BandMatrix_node">
        <EulerImplicitSolver name="odesolver" printLog="false"  rayleighStiffness="0.1" rayleighMass="0.1" />
        <BandMatrixSolver template="BandMatrix" />


        <MechanicalObject />
        <UniformMass vertexMass="1"/>
        <RegularGridTopology nx="4" ny="4" nz="10" xmin="-9" xmax="-6" ymin="0" ymax="3" zmin="0" zmax="9" />
        <FixedProjectiveConstraint indices="0 1 2 3 4 5 6 7 8 9 10 11 12 13 14 15" />
        <HexahedronFEMForceField name="FEM" youngModulus="4000" poissonRatio="0.3" method="large" />
    </Node> -->


</Node>
